<Node name="root" dt="0.02">
    <RequiredPlugin name="Sofa.Component.Constraint.Projective"/> <!-- Needed to use components [AttachProjectiveConstraint FixedProjectiveConstraint] -->
    <RequiredPlugin name="Sofa.Component.Engine.Select"/> <!-- Needed to use components [BoxROI] -->
    <RequiredPlugin name="Sofa.Component.LinearSolver.Iterative"/> <!-- Needed to use components [CGLinearSolver] -->
    <RequiredPlugin name="Sofa.Component.Mass"/> <!-- Needed to use components [UniformMass] -->
    <RequiredPlugin name="Sofa.Component.ODESolver.Backward"/> <!-- Needed to use components [EulerImplicitSolver] -->
    <RequiredPlugin name="Sofa.Component.SolidMechanics.FEM.Elastic"/> <!-- Needed to use components [TetrahedronFEMForceField] -->
    <RequiredPlugin name="Sofa.Component.StateContainer"/> <!-- Needed to use components [MechanicalObject] -->
    <RequiredPlugin name="Sofa.Component.Topology.Container.Grid"/> <!-- Needed to use components [RegularGridTopology] -->
    <RequiredPlugin name="Sofa.Component.Visual"/> <!-- Needed to use components [VisualStyle] -->
    <RequiredPlugin name="SofaCUDA"/> <!-- Needed to use components [BoxROI FixedConstraint IdentityMapping MechanicalObject MeshSpringForceField PlaneForceField QuadBendingSprings SphereForceField UniformMass] -->


    <VisualStyle displayFlags="showBehaviorModels showForceFields" />
    <DefaultAnimationLoop/>
    <Node name="Single">
        <EulerImplicitSolver name="cg_odesolver" printLog="false"  rayleighStiffness="0.1" rayleighMass="0.1" />
        <CGLinearSolver iterations="25" name="linear solver" tolerance="1.0e-9" threshold="1.0e-9" />
        <Node name="M1">
            <MechanicalObject showObject="1"/>
            <UniformMass vertexMass="1" />
            <RegularGridTopology nx="4" ny="4" nz="28" xmin="-9" xmax="-6" ymin="0" ymax="3" zmin="0" zmax="27" />
            <BoxConstraint box="-9.1 -0.1 -0.1 -5.9 3.1 0.1" />
            <!--<BoxConstraint box="-9.1 -0.1 26.9 -5.9 3.1 27.1" />-->
            <TetrahedronFEMForceField name="FEM" youngModulus="4000" poissonRatio="0.3" />
        </Node>
    </Node>
    <Node name="AttachOneWay">
        <EulerImplicitSolver name="cg_odesolver" printLog="false" />
        <CGLinearSolver iterations="25" name="linear solver" tolerance="1.0e-9" threshold="1.0e-9" />
        <Node name="M1">
            <MechanicalObject />
            <UniformMass vertexMass="1" />
            <RegularGridTopology nx="4" ny="4" nz="10" xmin="-4" xmax="-1" ymin="0" ymax="3" zmin="0" zmax="9" />
            <BoxConstraint box="-4.1 -0.1 -0.1 -0.9 3.1 0.1" />
            <TetrahedronFEMForceField name="FEM" youngModulus="4000" poissonRatio="0.3" />
        </Node>
        <Node name="M2">
            <EulerImplicitSolver name="cg_odesolver" printLog="false" />
            <CGLinearSolver iterations="25" name="linear solver" tolerance="1.0e-9" threshold="1.0e-9" />
            <MechanicalObject />
            <UniformMass vertexMass="1" />
            <RegularGridTopology nx="4" ny="4" nz="10" xmin="-4" xmax="-1" ymin="0" ymax="3" zmin="9" zmax="18" />
            <TetrahedronFEMForceField name="FEM" youngModulus="4000" poissonRatio="0.3" />
        </Node>
        <Node name="M3">
            <EulerImplicitSolver name="cg_odesolver" printLog="false" />
            <CGLinearSolver iterations="25" name="linear solver" tolerance="1.0e-9" threshold="1.0e-9" />
            <MechanicalObject />
            <UniformMass vertexMass="1" />
            <RegularGridTopology nx="4" ny="4" nz="10" xmin="-4" xmax="-1" ymin="0" ymax="3" zmin="18" zmax="27" />
            <!--<BoxConstraint box="-4.1 -0.1 26.9 -0.9 3.1 27.1" />-->
            <TetrahedronFEMForceField name="FEM" youngModulus="4000" poissonRatio="0.3" />
        </Node>
        <AttachConstraint object1="@M1" object2="@M2" indices1="144 145 146 147 148 149 150 151 152 153 154 155 156 157 158 159" indices2="0 1 2 3 4 5 6 7 8 9 10 11 12 13 14 15" constraintFactor="1 1 1 1 1 1 1 1 1 1 1 1 1 1 1 1"/>
        <AttachConstraint object1="@M2" object2="@M3" indices1="144 145 146 147 148 149 150 151 152 153 154 155 156 157 158 159" indices2="0 1 2 3 4 5 6 7 8 9 10 11 12 13 14 15" constraintFactor="1 1 1 1 1 1 1 1 1 1 1 1 1 1 1 1"/>
    </Node>
    <Node name="AttachTwoWay">
        <EulerImplicitSolver name="cg_odesolver" printLog="false" />
        <CGLinearSolver iterations="25" name="linear solver" tolerance="1.0e-9" threshold="1.0e-9" />
        <Node name="M1">
            <MechanicalObject />
            <UniformMass vertexMass="1" />
            <RegularGridTopology nx="4" ny="4" nz="10" xmin="1" xmax="4" ymin="0" ymax="3" zmin="0" zmax="9" />
            <BoxConstraint box="0.9 -0.1 -0.1 4.1 3.1 0.1" />
            <TetrahedronFEMForceField name="FEM" youngModulus="4000" poissonRatio="0.3" />
        </Node>
        <Node name="M2">
            <EulerImplicitSolver name="cg_odesolver" printLog="false" />
            <CGLinearSolver iterations="25" name="linear solver" tolerance="1.0e-9" threshold="1.0e-9" />
            <MechanicalObject />
            <UniformMass vertexMass="1" />
            <RegularGridTopology nx="4" ny="4" nz="10" xmin="1" xmax="4" ymin="0" ymax="3" zmin="9" zmax="18" />
            <TetrahedronFEMForceField name="FEM" youngModulus="4000" poissonRatio="0.3" />
        </Node>
        <Node name="M3">
            <EulerImplicitSolver name="cg_odesolver" printLog="false" />
            <CGLinearSolver iterations="25" name="linear solver" tolerance="1.0e-9" threshold="1.0e-9" />
            <MechanicalObject />
            <UniformMass vertexMass="1" />
            <RegularGridTopology nx="4" ny="4" nz="10" xmin="1" xmax="4" ymin="0" ymax="3" zmin="18" zmax="27" />
            <!--<BoxConstraint box="0.9 -0.1 26.9 4.1 3.1 27.1" />-->
            <TetrahedronFEMForceField name="FEM" youngModulus="4000" poissonRatio="0.3" />
        </Node>
        <AttachConstraint object1="@M1" object2="@M2" twoWay="true" indices1="144 145 146 147 148 149 150 151 152 153 154 155 156 157 158 159" indices2="0 1 2 3 4 5 6 7 8 9 10 11 12 13 14 15" constraintFactor="1 1 1 1 1 1 1 1 1 1 1 1 1 1 1 1"/>
        <AttachConstraint object1="@M2" object2="@M3" twoWay="true" indices1="144 145 146 147 148 149 150 151 152 153 154 155 156 157 158 159" indices2="0 1 2 3 4 5 6 7 8 9 10 11 12 13 14 15"/>
    </Node>
</Node>
